FREQR := 40
t_L := 1.3*10^-6
t_H := 600*10^-9
CCR := 4
T_R := 300*10^-9
DUTY := 1
T_PCLK := 1/(FREQR*1000000) = 2.5e-8
T_HIGH := (1 + 8*DUTY)*CCR*T_PCLK = 9e-7
T_LOW := (2 + 14*DUTY)*CCR*T_PCLK = 1.6e-6
F_SCL := 1/(T_LOW + T_HIGH) = 400000
TRISE := T_R/T_PCLK = 12
