HSYNC_def := 16
VSYKC_def := 4
LCD_WIDTH := 240
HBP_def := 20
VBP_def := 2
LCD_HEIGTH := 320
HFP_def := 16
VFP_def := 2
HSYNC_LTDC := HSYNC_def - 1 = 15
VSYKC_LTDC := VSYKC_def - 1 = 3
HBP_LTDC := HSYNC_def + HBP_def - 1 = 35
VBP_LTDC := VSYKC_def + VBP_def - 1 = 5
AWIDTH := HBP_LTDC + LCD_WIDTH = 275
AHEIGHT := VBP_LTDC + LCD_HEIGTH = 325
TWIDTH := AWIDTH + HFP_def = 291
THEIGHT := AHEIGHT + VFP_def = 327
FR := 70  # Hz
IntClock := 615  # kHz
DOTCLK_r := FR*(LCD_HEIGTH + VBP_def + VFP_def)*(LCD_WIDTH + HSYNC_def + HBP_def + HFP_def) = 6622560  # Hz
FramRate_notm_mode := IntClock*1000/(27*1*(LCD_HEIGTH + VBP_def + VFP_def)) = 70.3018  # Hz
LCD_CLK := 256*1000000/(5*4) = 12800000  # MHz
ExtClock := LCD_CLK/20 = 640000  # Hz
PCDIV := LCD_CLK/(ExtClock*2) - 1 = 9
